# Initialization
units		real
boundary	p p p
atom_style	full
variable name index ice_Ih668
log 		${name}.txt
# neighbour list search related settings
neighbor	1.0 bin
neigh_modify	every 10 one 10000

# read geometry
#read_data	${name}.data
read_restart restarts/restart.${nname}
include forcefield.${name}

# time step and output frequency
# thermo_style custom time temp pe ke etotal
thermo_style	one
thermo          1000
variable dt equal 2.0
variable T equal 150.0
timestep	${dt}

print "seed1 = ${seed1}"
print "seed2 = ${seed2}"
print "nname = ${nname}"

######################################################
## Equilibration (Langevin dynamics)
## assign initial velocity
#velocity 	all create 300.0 ${seed1} mom yes rot yes dist gaussian
## Langevin thermostat, limited step size to 0.1
#fix		1 all nve
## Tstart Tend damp seed
#fix		2 all langevin 300.0 300.0 10.0 ${seed2}
#fix     0 all recenter INIT INIT INIT
#dump        1 all dcd 1000 eq.dcd
## 20ps equibliration
#run		20000
#unfix 0
#unfix 1
#unfix 2
#write_restart 	restart.${name}.eq
#undump 1

####################################################
# NVT equilibration
velocity 	all create $T ${seed1} mom yes rot yes dist gaussian
fix constrain all shake 1.0e-4 100 0 b 1 a 1
fix         NVT all nvt temp $T $T 100.0
fix center all recenter INIT INIT INIT
dump        1 all dcd 1000 eq.dcd
run         10000
unfix       NVT
undump      1

#####################################################
# Define Settings
compute perke all ke/atom
compute perpe all pe/atom
compute perstress all stress/atom NULL virial
compute flux all heat/flux perke perpe perstress
# normalize J vector using volume of the box
# see https://lammps.sandia.gov/doc/compute_heat_flux.html
variable     Jx equal c_flux[1] #/vol
variable     Jy equal c_flux[2] #/vol
variable     Jz equal c_flux[3] #/vol

######################################################
# production run with NVE
# reset time step 0.5 fs
timestep ${dt}
# reset time
reset_timestep 0
thermo_style custom step time temp pe ke etotal v_Jx v_Jy v_Jz
thermo_modify line multi format float %15.8e
thermo 1000
fix 1 all nve
fix 2 all ave/correlate 1 5000 10000 c_flux[1] c_flux[2] c_flux[3] type auto file corr.data ave running
dump 		2 all dcd 1000 nve.dcd
run 100000 # 400 ps

unfix center
unfix constrain
unfix 1
unfix 2
write_restart restart.${name}.nve
undump 2

variable v equal vol
print "Simulation done with volume: ${v}"
print "All done"
